*Heading
 stauchen
** Job name: Job_sx-px Model name: Model-1
** Generated by: Abaqus/CAE 6.14-2
*Preprint, echo=NO, model=NO, history=NO, contact=NO
**
** PARTS
**
*Part, name=Part-px
*Node
      1,   4.79746485,    1.4086628,           0.
      2,   4.20626783,   2.70320415,           0.
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*Element, type=C3D8
  1,  82, 125,  88,  83,  17,  60,  23,  18
  2,  80, 124, 126,  81,  15,  59,  61,  16
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*Nset, nset=_PickedSet4, internal, generate
   1,  780,    1
*Elset, elset=_PickedSet4, internal, generate
   1,  583,    1
** Section: Section-px
*Solid Section, elset=_PickedSet4, material=Material-px
,
*End Part
**
*Part, name=Part-sx
*End Part
**
**
** ASSEMBLY
**
*Assembly, name=Assembly
**
*Instance, name=Part-sx, part=Part-sx
*Node
      1,   4.79746485,    1.4086628,           0.
      2,   4.20626783,   2.70320415,           0.
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*Element, type=C3D8
  1,  82, 125,  88,  83,  17,  60,  23,  18
  2,  80, 124, 126,  81,  15,  59,  61,  16
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*Nset, nset=_PickedSet5, internal, generate
   1,  780,    1
*Elset, elset=_PickedSet5, internal, generate
   1,  583,    1
** Section: Section-sx
*Solid Section, elset=_PickedSet5, material=Material-sx
,
*End Instance
**
*Instance, name=Part-px, part=Part-px
         21.,           0.,           0.
*End Instance
**
*Nset, nset=_PickedSet12, internal, instance=Part-sx, generate
 716,  780,    1
*Nset, nset=_PickedSet12, internal, instance=Part-px, generate
 716,  780,    1
*Elset, elset=_PickedSet12, internal, instance=Part-sx, generate
 531,  583,    1
*Elset, elset=_PickedSet12, internal, instance=Part-px, generate
 531,  583,    1
*Nset, nset=_PickedSet13, internal, instance=Part-sx, generate
  1,  65,   1
*Nset, nset=_PickedSet13, internal, instance=Part-px, generate
  1,  65,   1
*Elset, elset=_PickedSet13, internal, instance=Part-sx, generate
  1,  53,   1
*Elset, elset=_PickedSet13, internal, instance=Part-px, generate
  1,  53,   1
*End Assembly
**
** MATERIALS
**
*Material, name=Material-px
*Depvar
     49,
*User Material, constants=2, unsymm
2.,2.
*Material, name=Material-sx
*Depvar
     49,
*User Material, constants=2, unsymm
1.,1.
**
** BOUNDARY CONDITIONS
**
** Name: unten Type: Displacement/Rotation
*Boundary
_PickedSet13, 1, 1
_PickedSet13, 2, 2
_PickedSet13, 3, 3
_PickedSet13, 4, 4
_PickedSet13, 5, 5
_PickedSet13, 6, 6
** ----------------------------------------------------------------
**
** STEP: Step-1
**
*Step, name=Step-1, nlgeom=YES, inc=10000
drücken
*Static
0.01, 10., 0.0001, 1.
**
** BOUNDARY CONDITIONS
**
** Name: oben Type: Displacement/Rotation
*Boundary
_PickedSet12, 1, 1
_PickedSet12, 2, 2
_PickedSet12, 3, 3, -7.5
_PickedSet12, 4, 4
_PickedSet12, 5, 5
_PickedSet12, 6, 6
**
** OUTPUT REQUESTS
**
*Restart, write, frequency=0
*Print, solve=NO
**
** FIELD OUTPUT: F-Output-1
**
*Output, field, variable=PRESELECT
**
** HISTORY OUTPUT: H-Output-1
**
*Output, history, variable=PRESELECT
*End Step
